# [component: outputs N]
# Исходные данные (изотермы) p/p0 от V
rows(N) = 88
vm := 89.93
R := 8.314
Tem := 303
N := csort(N, 0)
σ := 0.00000275
Pd := N[:, 0]
V := N[:, 1]
# Fitting function:
fit(x) := linterp(Pd, V, x)
min(Pd) = 0.00487206
x := min(Pd), min(Pd) + 0.001 .. max(Pd)
max(Pd) = 0.996
# Fitting function:
b := sum(Pd[i] - Pd[i - 1], i = 1 .. length(Pd) - 1)/(length(Pd)/2)*2
b = 0.0450513
b := 0.0000002
V := ksmooth(Pd, V, b)  # disabled
fit(x) := linterp(Pd, V, x)
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x =  # no stored result
fit(x) =  # no stored result
# Ссылка на t-curve
fit(x) =  # no stored result
# [component: outputs tcurve]
# [component: outputs M]
M := submatrix(M, 150, rows(M) - 10, 0, 1)  # disabled
M := csort(M, 0)
pp0 := M[:, 0]
thi := M[:, 2]
fitt(t) := linterp(pp0, thi, t)  # disabled
max(thi) = 17.986
t := min(thi), min(thi) + 0.01 .. max(thi)  # disabled
fitt(a) := linterp(pp0, thi, a)
k := 3000
a := min(pp0), min(pp0) + 0.001 .. max(pp0)
m := 1 .. k
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a =  # no stored result
max(pp0) = 0.925
fitt(a) =  # no stored result
min(pp0) = 0.0005
# Задаем шаг разбиения области давлений
z[m] := max(Pd)/k*m  # disabled
z[m] := min(Pd) + (max(Pd) - min(Pd))/k*m
z[m] := min(pp0) + (max(pp0) - min(pp))/k*m  # disabled
# Значения объема при  разбиении изотермы z[m]
# (подставляем значения давлений в аппроксимированную изотерму)
Tem = 303
VV[m] := fit(z[m])  # объем от давления(изотерма)
z[m] =  # no stored result
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VV[m] =  # no stored result
# Значения радиусов Кельвина при разбиении изотермы z[m]
rK[m] := -σ*vm/(R*Tem*ln(z[m]))*10^8
# Значения толщины пленки при разбиении изотермы z[m]
V = [
    0.438249; 0.443916; 0.459028; 0.460917; 0.476029; 0.489252; 0.506253; 0.523254; 0.542144; 0.553478
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]
Chanfit[m] := fitt(z[m])  # толщина пленки от давления(t кривая)
b := sum(rK[i] - rK[i - 1], i = 1 .. length(rK) - 1)/(length(rK)/2)*2
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b =  # no stored result; disabled
k := 3000
b := 0.0000005
m := 1 .. k
V := ksmooth(rK + Chanfit, VV, b)
V := linterp(rK[m] + Chanfit[m], VV[m], b)  # disabled
# по кельвину
b := min(rK[m] + Chanfit[m]), min(rK[m] + Chanfit[m]) + 1 .. max(rK[m] + Chanfit[m])  # disabled
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V[m] := max(V)/k*m  # disabled
V =  # no stored result
D[k] := 0
SH[3000] := 0  # disabled
V[m] =  # no stored result
D[m] := ((V[m] - V[m - 1]) - (Chanfit[m] - Chanfit[m - 1])*sum(2*D[j]/(rK[j] + Chanfit[j]), j = 3000 .. m - 1) + (Chanfit[m] - Chanfit[m - 1])*Chanfit[m]*sum(2*D[j]/(rK[j] + Chanfit[j])^2, j = 3000 .. m - 1))*(rK[m] + Chanfit[m])^2/(rK[m] + (Chanfit[m] - Chanfit[m - 1]))^2  # disabled
VV =  # no stored result
VD[m] := max(V) - sum(D[j], j = 3000 .. m - 1)
sum(2*D[j]/(rK[j] + Chanfit[j]), j = 3000 .. 2106) = 0
max(V) = 2.54826
max(V) = 2.54826
SH[m] := (V[m] - V[m - 1])*(rK[m] + Chanfit[m])/(rK[m] + (Chanfit[m] - Chanfit[m - 1]))
D[m] =  # no stored result
VSH[m - 1] := max(V) - sum(SH[j], j = 3000 .. m)
sum(SH[j], j = 3000 .. 2999) = 0.431737
VSH[2999] = 2.33211
VSH[3000] := max(V)
VD[3000] = 2.54826
sum(2*SH[j]/(rK[j] + Chanfit[j]), j = 2106 .. 3000) = 0.00325409
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max(V) = 2.54826
(Chanfit[m] - Chanfit[m - 1])*Chanfit[m]*sum(2*D[j]/(rK[j] + Chanfit[j])^2, j = 3000 .. m - 1) =  # no stored result
(Chanfit[m] - Chanfit[m - 1])*sum(2*D[j]/(rK[j] + Chanfit[j]), j = 3000 .. m - 1) =  # no stored result
V[m] - V[m - 1] =  # no stored result
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Chanfit[m] =  # no stored result
SH[m] =  # no stored result
VSH[m] =  # no stored result
VD[m] =  # no stored result
Chanfit[m] + rK[m] =  # no stored result
V =  # no stored result
k = 3000
r[m - k] =  # error: This variable is undefined.
