# [component: outputs M]
n := rows(M)
n = 20
M := submatrix(M, 0, n - 2, 0, 1)  # i.e. data without last point
P := M[:, 0]  # relative pressure
V := M[:, 1]  # adsorption, cm^3/g
T := 303
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min(P) = 1.05e-5
max(P) = 0.257
P = [1.05e-5; 1.4e-5; 2.74e-5; 4.52e-5; 6.76e-5; 0.000107; 0.000146; 0.000191; 0.000298; 0.00043; 0.000585; 0.000967; 0.00325; 0.0165; 0.0408; 0.0507; 0.102; 0.181; 0.257]
n[0] := intercept(ln(P)^2, ln(V))
max(V) = 1.16199
n[0] = -0.222624
n[1] := slope(ln(P)^2, ln(V))
n[1] = -0.0266049
Y := ln(V)
X := ln(P)
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corr(ln(P)^2, ln(V)) = -0.978786
corr(ln(P)^2, ln(V))^2 = 0.958022
cvar(ln(P)^2, ln(V)) = -46.2154
stderr(ln(P)^2, ln(V)) = 0.245386
W[02] := 2.7^n[0]
E[02] := 8.31*T/(-n)[1]^0.5
W[02] = 0.801619
# Stoeckli equation:
E[02] = 15437
W(x, W_0, C, ν) := W_0*(1 - C*x^3)^(-ν)  # where W_0 - max micropore volume, C=(RT/K)^3/a, x = lnp/p_0
n(f) := n[0] + n[1]*f
scale := max(vectorize(|n(ln(P)^2) - ln(V)|))*1.1
# Stoeckli equation in logarithmic form:
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y(x, b) := b[0] - b[1]*ln(1 - b[2]*x^3)  # where y=lnW, b_0 = lnW_0, b_1 = ν, b_2 = C
# vector-function for genfit:
ln(P)^2 = [131.426; 124.913; 110.354; 100.088; 92.1965; 83.5886; 78.0025; 73.329; 65.9087; 60.0892; 55.4116; 48.1818; 32.8226; 16.8461; 10.2341; 8.89131; 5.2111; 2.92156; 1.84601]
f(x, b) := [y(x, b); 1; -ln(1 - b[2]*x^3); b[1]*x^3/(1 - b[2]*x^3)]
# Initial approximation for parameters:
guess := [1; 2; 0.0003]
# Determination of best fit parameters:
Par := genfit(X, Y, guess, f)
Par = [0.0546858; 1.04531; 0.015118]
# Fitting function:
Z(x) := f(x, Par)[0]
# Correlation factor:
corr(vectorize(Z(X)), Y)^2 = 0.995254
x := min(X), min(X) + 0.01 .. max(X)
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# Parameters:
W_0 := exp(Par[0])
W_0 = 1.05621  # cm^3/g
ν := Par[1]
ν = 1.04531
C := Par[2]
C = 0.015118
# The value of a in eq. (8) in Stoeckli paper:
K := 10.8 + 123.1/(E[02] - 11.4)
K := 24  # disabled  # nm*kJ/mol
T := 303  # K
K = 10.808
# if K=4 then a=3.068
# Distribution function (eq. 9):
a := (8.314472*T*10^-3/K)^3*1/C
a = 0.837729  # nm^-3
F(L) := 3*(a*L^3)^ν*exp(-a*L^3)/(L*Γ(ν))  # Degree of filling: θ vs. p/p_0
integral(F(x), x = 0 .. ∞) = 1
θ(x) := exp(Z(x))/W_0
L := 0.01, 0.05 .. 6
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F(L) = [
    0.000136614; 0.00425021; 0.0149086; 0.03266; 0.0577932; 0.0904298; 0.130536; 0.177919; 0.23221; 0.292858
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]
L = [
    0.01; 0.05; 0.09; 0.13; 0.17; 0.21; 0.25; 0.29; 0.33; 0.37
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]
