# [component: outputs N]
rows(N) = 3000
N := csort(N, 0)
Pd := N[:, 2]
V := N[:, 1]
# Fitting function:
fit(x) := linterp(Pd, V, x)  # disabled
min(Pd) = 0.132419
x := min(Pd), min(Pd) + 0.02 .. max(Pd)
max(Pd) = 247.706
# Fitting function:
Pd = [
    0.132419; 0.151194; 0.16623; 0.179269; 0.191303; 0.202666; 0.212963; 0.222878; 0.232502; 0.241313
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]
V = [
    -0.278337; -0.278337; -0.0878807; -0.087305; -0.0867055; -0.0860834; -0.0854409; -0.0847788; -0.0840973; -0.0833992
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]
b := sum(Pd[i] - Pd[i - 1], i = 1 .. length(Pd) - 1)/(length(Pd)/2)*2
b = 0.330098
b := 0.85
V1 := ksmooth(Pd, V, b)
fit(x) := linterp(Pd, V1, x)
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x = [
    0.132419; 0.152419; 0.172419; 0.192419; 0.212419; 0.232419; 0.252419; 0.272419; 0.292419; 0.312419
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]
fit(x) = [
    0.0224928; 0.0270878; 0.0317316; 0.0364159; 0.0411399; 0.0458973; 0.0506832; 0.0554912; 0.0603165; 0.065154
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]
y(x) := d/dx(fit(x))
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y(x) = [
    0.229623; 0.231699; 0.233287; 0.235731; 0.236701; 0.23828; 0.239977; 0.240806; 0.241686; 0.24205
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]
